// COMSOL Multiphysics 5.6.0.280 model "Dendrite-Nickel-Github-empty.mph"
// Dendritic Solidification im Comsol Multiphysics
// This is an implementation of dendritic solidification of a pure metal in Comsol Multiphysics (developed in 5.6).
// Please refer to:
// https://github.com/Leibniz-IWT/comsol-dendrite
// for further information on the model and my contact data. If you find this model useful and use it, feel free to cite it with the DOI given at the github readme file.
// Outline of the model tree

Parameters
  delta = 0.025  // anistrpic strength
  theta0 = pi/2  // orientation of anisotropy axis
  J = 4  // anisotropy mode
  DH = 2.35e9  // Latent Heat
  rho = 1  // Density
  c_p = 5.42e6  // specific heat
  T_m = 1728  // Melting Point
  D = 1.55e-5  // Thermal Diffusity
  sigma_0 = 0.37  // Interface Energy
  lambda_0 = 8e-8/2  // Interface width /2
  M = T_m*mu/(2.73*DH*lambda_0)  // Interface Mobility
  l_geom = 3e-5  // length of geomery
  r_nucleus = 0.5e-6/3  // radius of nucleus
  meshsize = lambda_0/4  // Size of mesh
  w = 6.6*sigma_0/lambda_0  // Free energy factor
  epsilon_0 = sqrt(2.73*lambda_0*sigma_0)  // Inerface thickness
  mu = 2  // Kinetic coefficient at interface
  a = 0.025  // random strength

Functions
  rn1: Random "Random Noise" | funcname = rnd1; nargs = 3; uniformrange = 2; seed = 113013

Variables
  var2 "variables of phase field"
    theta = (px==0)*(0.5*pi*(py>0)+1.5*pi*(py<0))+(px!=0)*(atan((py+theta0*eps)/(px+eps))+(px>0)*2.0*pi*(py<=0)+(px<0)*pi)
    sigma = 1+delta*cos(J*(theta-theta0))
    eprime = -epsilon_0*delta*J*sin(J*(theta-theta0))
    e = epsilon_0*sigma
    e2 = epsilon_0^2*sigma^2
    hp = p^3*(10-15*p+6*p^2)  // h(phi)
    dhp = 30*(p-1)^2*p^2  // h'(phi)
    gp = p^2*(1-p)^2  // g(phi)
    dgp = 2*p*(2*p^2-3*p+1)  // g'(phi)

Geometry
  geom1 "Geometry 1" (2D, length unit m)
    r1: Rectangle | base = center; size = {l_geom, l_geom}
    c1: Circle | r = r_nucleus
    c2: Circle | r = r_nucleus*1.1
    fin: Finalize "Form Union"

Physics
  c: CoefficientFormPDE "Phase Field Pure Metal" on all domains
    dependent variable p = {p, T}
    ShapeProperty.shapeFunctionType = shlag
    ShapeProperty.order = 2
    cfeq1: CoefficientFormPDE "Phase Field Equations" (default)
      c = {{0, 0, 0, 0}, {0, 0, 0, 0}, {0, 0, 0, 0}, {0, 0, 0, 0}}
      f = {-w*dgp -dhp*DH/T_m*(T-T_m) + 16*a*rnd1(t,x,y)*p^2*(1-p^2), 0}
      da = {1/M, -dhp*DH/(rho*c_p), 0, 1}
      ga = {{e*eprime*py-e2*px, -e*eprime*px-e2*py}, {-Tx*D, -Ty*D}}
    zflx1: ZeroFluxBoundary "Zero Flux 1" (default)
    init1: init "Initial Values 1" (default) | p = 1-flc2hs(sqrt(x^2+y^2)-r_nucleus,r_nucleus/10); T = 1468

Mesh
  mesh1 "Mesh 1"
    size: MeshSizeDefault | hmax = meshsize*6; hgrad = 1.05; hauto = 2
    size1: Size on domains 2, 3 | hmax = meshsize; hauto = 2
    ftri1: FreeTri "Free Triangular 1" on remaining entities
  mesh6 "Mesh 6" (physics-controlled)
  mesh7 "Mesh 7" (physics-controlled)
  mesh8 "Mesh 8" (physics-controlled)
  mesh9 "Mesh 9" (physics-controlled)
  mesh10 "Mesh 10" (physics-controlled)
  mesh11 "Mesh 11" (physics-controlled)
  mesh12 "Mesh 12" (physics-controlled)
  mesh13 "Mesh 13" (physics-controlled)
  mesh14 "Mesh 14" (physics-controlled)
  mesh15 "Mesh 15"
  mesh16 "Mesh 16"
  mesh17 "Mesh 17"
  mesh18 "Mesh 18"
  mesh19 "Mesh 19"
  mesh20 "Mesh 20"
  mesh21 "Mesh 21"
  mesh22 "Mesh 22"
  mesh23 "Mesh 23"
  mesh24 "Mesh 24"

Studies
  std1 "Study 1"
    time: Transient "Time Dependent" | tlist = range(0,4.0e-7/99,4.0e-7); adaptselection = domains 1; timeadaption = on

Solver configurations
  sol1 "Solution 1" (study std1)
    v1: Variables "Dependent Variables 1"
      mod1_p: Field "Dependent variable p (mod1.p)" | scalemethod = manual; resscalemethod = auto
      mod1_T: Field "Dependent variable T (mod1.T)" | scalemethod = manual; scaleval = T_m; resscalemethod = auto
    t1: Time "Time-Dependent Solver 1" | tlist = range(0,4.0e-7/99,4.0e-7); initialstepbdf = 1e-12
      taDef: TimeAdaption "Adaptive Mesh Refinement"
        rmethod = regular
        maxrefinement = 3
        tadapmesh = {mesh15, mesh16, mesh17, mesh18, mesh19, mesh20, mesh21, mesh22, mesh23, mesh24}
      dDef: Direct
      fc1: FullyCoupled | linsolver = dDef; dtech = auto; maxiter = 20; stabacc = aacc
  sol2 "Refined Mesh Solution 1" (study std1)

Datasets
  dset1: Solution | solution = sol1
  dset2: Solution | solution = sol2
  rn1_ds1: Grid1D

Plots
  pg4: PlotGroup2D "Dendrite Plot" | data = dset2
    surf1: Surface | expr = p; unit = 1
      filt1: Filter | expr = x<=0
    surf2: Surface | expr = T
      filt1: Filter | expr = x>0

Exports
  anim1: Animation | type = imageseq; framesel = all; width = 1024; height = 768